16/06/2015
13:45
; Script generated by the pharmML2Nmtran Converter v.0.1.0
; Source	: PharmML 0.6.0
; Target	: NMTRAN 7.3.0
; Model 	: UseCase1
; Dated 	: Tue Jun 16 13:45:35 BST 2015

$PROBLEM "C:\SEE\converter-toolbox-distribution\converter-toolbox-service\tmp\4464faf7-14b5-4cba-acc3-f80459768611\inputs\models\UseCase1.mdl - generated by MDL2PharmML v.6.0"

$INPUT  ID TIME WT AMT DVID DV MDV LOGTWT
$DATA ../data/warfarin_conc.csv IGNORE=@
$SUBS ADVAN13 TOL=9

$MODEL
COMP (COMP1) 	;GUT
COMP (COMP2) 	;CENTRAL

$PK
POP_CL = THETA(1)
POP_V = THETA(2)
POP_KA = THETA(3)
POP_TLAG = THETA(4)
BETA_CL_WT = THETA(5)
BETA_V_WT = THETA(6)
RUV_PROP = THETA(7)
RUV_ADD = THETA(8)

ETA_CL = ETA(1)
ETA_V = ETA(2)
ETA_KA = ETA(3)
ETA_TLAG = ETA(4)

MU_1 = LOG(POP_CL)+BETA_CL_WT * logtWT;
CL = EXP(MU_1 + ETA(1));

MU_2 = LOG(POP_V)+BETA_V_WT * logtWT;
V = EXP(MU_2 + ETA(2));

MU_3 = LOG(POP_KA);
KA = EXP(MU_3 + ETA(3));

MU_4 = LOG(POP_TLAG);
TLAG = EXP(MU_4 + ETA(4));

A_0(1) = 0
A_0(2) = 0

$DES
GUT = A(1)
CENTRAL = A(2)

IF (T.GE.TLAG) THEN
	RATEIN = (GUT*KA)
ELSE
	RATEIN = 0
ENDIF

CC_DES =  (CENTRAL/V)
DADT(1) = -(RATEIN)
DADT(2) = RATEIN-((CL*CENTRAL)/V)

$ERROR
CC =  (A(2)/V)

IPRED = CC
W = RUV_ADD+RUV_PROP*IPRED
Y = IPRED+W*EPS(1)
IRES = DV - IPRED
IWRES = IRES/W

$THETA
( 0.001 , 0.1 )	;POP_CL
( 0.001 , 8.0 )	;POP_V
( 0.001 , 0.362 )	;POP_KA
( 0.001 , 1.0 , 10.0 )	;POP_TLAG
(0.75 )	;BETA_CL_WT
(1.0 )	;BETA_V_WT
( 0.0 , 0.1 )	;RUV_PROP
( 0.0 , 0.1 )	;RUV_ADD

$OMEGA BLOCK(2) CORRELATION SD
(0.1 )	;PPV_CL
(0.0 )	;Empty Variable
(0.1 )	;PPV_V

$OMEGA
(0.1 SD )	;PPV_KA
(0.1 SD )	;PPV_TLAG

$SIGMA
1.0 FIX

$EST METHOD=SAEM INTER CTYPE=3 NITER=1000 NBURN=4000 NOPRIOR=1 CITER=10
  CALPHA=0.05 IACCEPT=0.4 ISCALE_MIN=1.0E-06 ISCALE_MAX=1.0E+06
  ISAMPLE_M1=2 ISAMPLE_M1A=0 ISAMPLE_M2=2 ISAMPLE_M3=2
  CONSTRAIN=1 EONLY=0 ISAMPLE=2 PRINT=50

$TABLE  ID TIME WT AMT DVID MDV LOGTWT PRED IPRED RES IRES WRES IWRES Y DV NOAPPEND NOPRINT FILE=sdtab

$TABLE  ID CL V KA TLAG ETA_CL ETA_V ETA_KA ETA_TLAG NOAPPEND NOPRINT FILE=patab

$TABLE  ID WT LOGTWT NOAPPEND NOPRINT FILE=cotab

NM-TRAN MESSAGES
 WARNINGS AND ERRORS (IF ANY) FOR PROBLEM    1
 (WARNING  2) NM-TRAN INFERS THAT THE DATA ARE POPULATION.
 (MU_WARNING 26) DATA ITEM(S) USED IN DEFINITION OF MU_(S) SHOULD BE CONSTANT FOR INDIV. REC.:
  LOGTWT

1NONLINEAR MIXED EFFECTS MODEL PROGRAM (NONMEM) VERSION 7.3.0
 ORIGINALLY DEVELOPED BY STUART BEAL, LEWIS SHEINER, AND ALISON BOECKMANN
 CURRENT DEVELOPERS ARE ROBERT BAUER, ICON DEVELOPMENT SOLUTIONS,
 AND ALISON BOECKMANN. IMPLEMENTATION, EFFICIENCY, AND STANDARDIZATION
 PERFORMED BY NOUS INFOSYSTEMS.
 PROBLEM NO.:         1
 "C:\SEE\converter-toolbox-distribution\converter-toolbox-service\tmp\446
 TOT. NO. OF OBS RECS:      250
 TOT. NO. OF INDIVIDUALS:     32
 GENERAL NONLINEAR KINETICS MODEL USING LSODA (ADVAN13)
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 #TBLN:      1
 #METH: Stochastic Approximation Expectation-Maximization (No Prior)
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
 #TERM:
 STOCHASTIC PORTION WAS COMPLETED
 REDUCED STOCHASTIC PORTION WAS COMPLETED

 ETABAR IS THE ARITHMETIC MEAN OF THE ETA-ESTIMATES,
 AND THE P-VALUE IS GIVEN FOR THE NULL HYPOTHESIS THAT THE TRUE MEAN IS 0.

 ETABAR:         7.9832E-06  7.9293E-06 -7.3049E-05  2.1868E-05
 SE:             4.3950E-02  2.0211E-02  6.3139E-02  2.8230E-02
 N:                      32          32          32          32

 P VAL.:         9.9986E-01  9.9969E-01  9.9908E-01  9.9938E-01

 ETAshrink(%):   2.1450E+00  1.3804E+01  4.3205E+01  5.1207E+01
 EBVshrink(%):   2.1473E+00  1.3793E+01  4.3215E+01  5.1219E+01
 EPSshrink(%):   7.6219E+00

 #TERE:
 Elapsed estimation time in seconds:   428.92

 ********************           STOCHASTIC APPROXIMATION EXPECTATION-MAXIMIZATION (NO PRIOR)         ********************
 #OBJT:**************                        FINAL VALUE OF LIKELIHOOD FUNCTION                      ********************
 #OBJV:********************************************     -435.226       **************************************************

 ********************           STOCHASTIC APPROXIMATION EXPECTATION-MAXIMIZATION (NO PRIOR)         ********************
 ********************                             FINAL PARAMETER ESTIMATE                           ********************

 THETA - VECTOR OF FIXED EFFECTS PARAMETERS   *********
         TH 1      TH 2      TH 3      TH 4      TH 5      TH 6      TH 7      TH 8
         1.32E-01  8.15E+00  1.43E+00  8.23E-01  5.81E-01  9.06E-01  1.07E-01  2.51E-08

 OMEGA - COV MATRIX FOR RANDOM EFFECTS - ETAS  ********
            ETA1      ETA2      ETA3      ETA4
 ETA1
+        6.66E-02
 ETA2
+        0.00E+00  1.82E-02
 ETA3
+        0.00E+00  0.00E+00  4.08E-01
 ETA4
+        0.00E+00  0.00E+00  0.00E+00  1.11E-01

 SIGMA - COV MATRIX FOR RANDOM EFFECTS - EPSILONS  ****
            EPS1
 EPS1
+        1.00E+00

 OMEGA - CORR MATRIX FOR RANDOM EFFECTS - ETAS  *******
            ETA1      ETA2      ETA3      ETA4
 ETA1
+        2.58E-01
 ETA2
+        0.00E+00  1.35E-01
 ETA3
+        0.00E+00  0.00E+00  6.39E-01
 ETA4
+        0.00E+00  0.00E+00  0.00E+00  3.33E-01

 SIGMA - CORR MATRIX FOR RANDOM EFFECTS - EPSILONS  ***
            EPS1
 EPS1
+        1.00E+00
 #CPUT: Total CPU Time in Seconds,      425.742
